Compile (IEEE123Master_No_Regs.dss)
Buscoords original/Buscoords.dat

Solve

! Show some selected results
Export Summary summary_no_regs.csv
Export Voltages voltages_no_regs.csv
Export Currents currents_no_regs.csv
Export Powers kVA powers_no_regs.csv

Plot Profile
