// New Generator.Gen3 phases=3 bus1=T_bus3082_L.1.2.3 kv=0.48 pf=1 conn=wye kw=750 kvar=0 Xdp=0.15 H=1.5 D=1.0

// OpenDSS Generator Parameters
// -------------------------------------------------------------------------------------
// Xdp = Per unit transient reactance of the machine. Used for Dynamics mode and Fault
// studies. Default is 0.27.For user models, this value is used for the Thevinen/Norton
// impedance for Dynamics Mode.
// Xdpp = Per unit subtransient reactance of the machine. Used for Harmonics. Default is
// 0.20.
// H = Per unit mass constant of the machine. MW-sec/MVA. Default is 1.0.
// D = Damping constant. Usual range is 0 to 4. Default is 1.0. Adjust to get damping

New Generator.Gen1 phases=3 bus1=8.1.2.3   kV=4.16 conn=wye kVA=500  kVAR=0 pf=1 Xdp=0.15 H=1.5 D=1.0
New Generator.Gen2 phases=3 bus1=18.1.2.3  kV=4.16 conn=wye kVA=700  kVAR=0 pf=1 Xdp=0.15 H=1.5 D=1.0
New Generator.Gen3 phases=3 bus1=28.1.2.3  kV=4.16 conn=wye kVA=500  kVAR=0 pf=1 Xdp=0.15 H=1.5 D=1.0
New Generator.Gen4 phases=3 bus1=48.1.2.3  kV=4.16 conn=wye kVA=1000 kVAR=0 pf=1 Xdp=0.15 H=1.5 D=1.0
New Generator.Gen5 phases=3 bus1=61.1.2.3  kV=4.16 conn=wye kVA=500  kVAR=0 pf=1 Xdp=0.15 H=1.5 D=1.0
New Generator.Gen6 phases=3 bus1=79.1.2.3  kV=4.16 conn=wye kVA=500  kVAR=0 pf=1 Xdp=0.15 H=1.5 D=1.0
New Generator.Gen7 phases=3 bus1=95.1.2.3  kV=4.16 conn=wye kVA=1000 kVAR=0 pf=1 Xdp=0.15 H=1.5 D=1.0
New Generator.Gen8 phases=3 bus1=100.1.2.3 kV=4.16 conn=wye kVA=500  kVAR=0 pf=1 Xdp=0.15 H=1.5 D=1.0
New Generator.Gen9 phases=3 bus1=108.1.2.3 kV=4.16 conn=wye kVA=500  kVAR=0 pf=1 Xdp=0.15 H=1.5 D=1.0
